// SBML level 2 version 4

model parkramhyb()

  // Compartments:
  compartment V = 1;

  // Species:
  species PM in V = 0;
  species PT in V = 0;
  species S in V = 5;
  species X in V = 1;

  // Parameters:
  D = 0.1;
  Feed = 0.525;
  Sin = 20;
  Y = 7.3;
  miumax = 21.87;
  u = 0.525;
  w1 = -0.2511027;
  w2 = -3.286456;
  w3 = -0.6160553;
  w4 = 7.890826;
  w5 = 3.319226;
  w6 = 2.636823;
  w7 = -0.8805786;
  w8 = -0.8554852;
  w9 = 0.6082669;
  w10 = -1.405869;
  w11 = 0.01336745;
  w12 = -4.578897e-5;
  w13 = -0.0169145;
  w14 = -0.2912512;
  w15 = -1.831552;
  w16 = 1.120477;
  w17 = -0.5940005;
  w18 = -0.424434;
  w19 = -0.08828252;
  w20 = -0.05018735;
  w21 = 1.240442;
  w22 = 0.7069019;
  w23 = 0.01455782;
  w24 = 1.390101;
  w25 = -0.1265231;
  w26 = -0.5613396;
  w27 = -0.08003391;
  w28 = 0.4522945;

  // Assignment rules:
  miu := w11*tanh(w1*S + w6) + w14*tanh(w2*S + w7) + w17*tanh(w3*S + w8) + w20*tanh(w4*S + w9) + w23*tanh(w5*S + w10) + w26;
  vPM := w12*tanh(w1*S + w6) + w15*tanh(w2*S + w7) + w18*tanh(w3*S + w8) + w21*tanh(w4*S + w9) + w24*tanh(w5*S + w10) + w27;
  vPT := w13*tanh(w1*S + w6) + w16*tanh(w2*S + w7) + w19*tanh(w3*S + w8) + w22*tanh(w4*S + w9) + w25*tanh(w5*S + w10) + w28;

  // Rate rules:
  V' = D*V;

  // Reactions:
  rPM: -> PM; V*vPM*(PT - PM);  // modifiers: PT
  rPT: -> PT; V*vPT*X;  // modifiers: X
  rSin: -> S; V*D*Sin;
  rX: 7.3 S -> X; V*miu*X;

  // Events:
  at (time >= 0): Feed = u;
end
