// SBML level 2 version 4

model main()

  // Compartments:
  compartment V = 1;

  // Species:
  species PM in V = 0;
  species PT in V = 0;
  species S in V = 5;
  species X in V = 1;

  // Parameters:
  D = 0.1;
  Feed = 0.525;
  Sin = 20;
  Y = 7.3;
  miumax = 21.87;
  u = 0.525;

  // Assignment rules:
  vPT := S*2.71828182^(-5*S)/(0.1 + S);
  vPM := 4.75*(21.87*S/(S + 0.4)/(S + 62.5))/(0.12 + 21.87*S/(S + 0.4)/(S + 62.5));
  miu := 21.87*S/(S + 0.4)/(S + 62.5);

  // Rate rules:
  V' = D*V;

  // Reactions:
  rPM: -> PM; V*vPM*(PT - PM);  // modifiers: PT
  rPT: -> PT; V*vPT*X;  // modifiers: X
  rSin: -> S; V*D*Sin;
  rX: 7.3 S -> X; V*miu*X;

  // Events:
  at (time >= 0): Feed = u;
end
